// SBML level 3 version 1

model lambda()
  // lambda phage (Robb and Shahrezaei, 2014)
  // model units - substance: item, time: minute, volume: litre, extent: item

  // Compartments:
  compartment Cell = 1e-15;

  // Species:
  substanceOnly species CI in Cell = 0;
  substanceOnly species CI2 in Cell = 0;
  substanceOnly species Cro in Cell = 0;
  substanceOnly species Cro2 in Cell = 0;
  substanceOnly species CII in Cell = 0;
  substanceOnly species CII2 in Cell = 0;
  substanceOnly species Prmr in Cell = 1;
  substanceOnly species PrmrCI2 in Cell = 0;
  substanceOnly species PrmrCro2 in Cell = 0;
  substanceOnly species Pre in Cell = 1;
  substanceOnly species PreCI2 in Cell = 0;
  substanceOnly species PreCII2 in Cell = 0;
  substanceOnly species mCI in Cell = 0;
  substanceOnly species mCII in Cell = 0;
  substanceOnly species mCro in Cell = 0;

  // Parameters:
  nA = 6.023e23;
  kdim = 1000000;
  kdis = 0.1;
  cideg = 0.04;
  crodeg = 0.05;
  ciideg = 0.12;
  kon = 1000000;
  koff = 0.1;
  beta = 1.6;
  delta = 1.2;
  alpha = 0.8;
  deg = 0.1;
  sigma = 0.5;

  // Reactions:
  CIdimer: 2 CI => CI2; kdim*CI*(CI - 1)/(nA*Cell);
  CIdiss: CI2 => 2 CI; kdis*CI2;
  CroDimer: 2 Cro => Cro2; kdim*Cro*(Cro - 1)/(nA*Cell);
  CroDiss: Cro2 => 2 Cro; kdis*Cro2;
  CIIdimer: 2 CII => CII2; kdim*CII*(CII - 1)/(nA*Cell);
  CIIdiss: CII2 => 2 CII; kdis*CII2;
  CIdeg: CI => ; cideg*CI;
  CroDeg: Cro => ; crodeg*Cro;
  CIIdeg: CII => ; ciideg*CII;
  CI2bind: Prmr + CI2 => PrmrCI2; kon*Prmr*CI2/(nA*Cell);
  CI2diss: PrmrCI2 => Prmr + CI2; koff*PrmrCI2;
  Cro2bind: Prmr + Cro2 => PrmrCro2; kon*Prmr*Cro2/(nA*Cell);
  Cro2diss: PrmrCro2 => Prmr + Cro2; koff*PrmrCro2;
  CII2bind: Pre + CII2 => PreCII2; kon*Pre*CII2/(nA*Cell);
  CII2diss: PreCII2 => Pre + CII2; koff*PreCII2;
  CIrtc: PrmrCI2 => PrmrCI2 + mCI; beta*PrmrCI2;
  CIIrtc: PreCII2 => PreCII2 + mCI; delta*PreCII2;
  Crotc: Prmr => Prmr + mCro; alpha*Prmr;
  CIItc: Prmr => Prmr + mCII; alpha*Prmr;
  mCIdeg: mCI => ; deg*mCI;
  mCrodeg: mCro => ; deg*mCro;
  mCIIdeg: mCII => ; deg*mCII;
  mCItl: mCI => mCI + CI; sigma*mCI;
  mCrotl: mCro => mCro + Cro; sigma*mCro;
  mCIItl: mCII => mCII + CII; sigma*mCII;
end
